# Input file for lammps simulation using Isotropic-anharmonic Shell Model
# proposed by Vielma and Schneider based on PBE Generalized Gradient
# Approximation(GGA) to Density Functional Theory(DFT):
# [Vielma Schneider 2013](http://dx.doi.org/10.1063/1.4827475)

# Vishal Boddu, June 2016
# Dan, May 2017


#-------------------------------------------------PARSING ARGSC
variable a internal 4.000
variable alpha internal 89.54

#'a` and `alpha` are lattice parameters

variable nx internal 6
variable ny internal 6
label loop
variable n loop 1 5 pad
variable nz equal 2*v_nz+10
#`n` is the number of RVE replica in each direction


#-------------------------------------------------SIMULATION BOX SETTINGS
variable la equal v_a*v_nx
variable lb equal v_a*v_ny
variable lc equal v_a*v_nz
variable alpha_r equal ${alpha}*PI/180.0
variable XY_DELTA equal v_la*cos(${alpha_r})
variable YZ_DELTA equal v_lb*cos(${alpha_r})
variable XZ_DELTA equal v_lc*cos(${alpha_r})#correct till now

##electric field strength in range of [0,20] *0.005
#variable ne equal 0.02
#variable ext_ef equal 20*0.005
variable ext_ef equal 0.02
variable ex equal $(v_ext_ef)/sqrt(3.0)
variable ey equal $(v_ext_ef)/sqrt(3.0)
variable ez equal $(v_ext_ef)/sqrt(3.0)

print "nz = $(v_nz)"

# ------------------------ INITIALIZATION ---------------------------------

units 		metal
dimension	3
boundary	p	p	s
atom_style	full

# ----------------------- ATOM DEFINITION ----------------------------

fix csinfo all property/atom i_CSID
read_data atom_$(v_nz).data fix csinfo NULL CS-Info

#change_box all x scale ${a} y scale ${b} z scale ${c} remap
#change_box all triclinic xy delta ${XY} xz delta ${XZ} yz delta ${YZ} remap
#change_box all triclinic xy delta 0.0 xz delta 0.0 yz delta 0.0 remap

group cores type 1 3 5
group shells type 2 4 6

neighbor 0.5 bin
neigh_modify delay 10 check yes
comm_modify vel yes

# ------------------------ FORCE FIELDS ------------------------------

#kspace_style ewald 1.0e-6
#pair_style   born/coul/long/cs 7.0
pair_style born/coul/wolf/cs 0.25 16 14.5

#------------------------ A,  rho, sigma=0,     C,      D
pair_coeff	*	*	 0.0000	1.0000	0.000	0.0000	0.000
pair_coeff	2	6	1061.3	0.3740	0.000	0.0000	0.000#1588.36	0.3553	0.000	0.0000	0.000
pair_coeff	4	6	3769.93	0.2589	0.000	0.0000	0.000#3131.25	0.2591	0.000	0.0000	0.000
pair_coeff	6	6	4740.00	0.2686	0.000	160.00	0.000#2641.41	0.3507	0.000	535.37	0.000
pair_modify tail no

bond_style class2
bond_coeff	1	0.0	125.9	0.000	0.000#155.820	0.0		   0.0000000
bond_coeff	2	0.0	161.0	0.000	20.833#166.275	0.0		 20.83333333
bond_coeff	3	0.0	15.5	0.0	166.67# 23.155	0.0		274.96833333

#-------------------------------------------------INITIALIZATION SETTINGS
change_box all triclinic xy delta $(v_XY_DELTA) yz delta $(v_YZ_DELTA) xz delta $(v_XZ_DELTA) remap

#compute cp all chargedisplace/atom
#compute dr all polar/atom
compute dr all displace/atom


#-------------------------------------------------FULL PARAMETER LIST

#-------------------------------------------------OUTPUT CONTROL SETTINGS
thermo 50
thermo_style custom step etotal epair evdwl ecoul elong ebond fnorm lx ly lz temp press pxx pyy pzz vol
dump dump_positions all atom 100 atomdump
dump dump_displ all custom 100 displdump id type q c_dr[1] c_dr[2] c_dr[3]
compute pol all polar/atom
dump dump_pol all custom 100 poldump_$(v_nz) id type c_pol[1] c_pol[2] c_pol[3]


#-------------------------------------------------SIMULATION SETTINGS
reset_timestep 0
fix ef all efield $(v_ex) $(v_ey) $(v_ez)
fix_modify ef energy yes
min_style fire
minimize 0.0 1e-07 30000 100000
min_style quickmin
minimize 0.0 1e-07 30000 100000
unfix ef

#variable pol_x equal c_pol[1]
#print "pol_x equal $(p1)"
#print "polarization in x-direction is $(p1)"

#read_dump displdump_$(v_ext_ef) -1 q
clear
next n
jump btloop.in loop
